*DO	*DO, Par, IVAL, FVAL, INC	Defines the beginning of a do-loop.	https://www.sharcnet.ca/Software/Ansys/16.2.3/en-us/help/ans_cmd/Hlp_C_DO.html
*ENDDO	*ENDDO	Ends a do-loop and starts the looping action.	https://www.sharcnet.ca/Software/Ansys/16.2.3/en-us/help/ans_cmd/Hlp_C_ENDDO.html
/ANGLE	/ANGLE, WN, THETA, Axis, KINCR	Rotates the display about an axis.	https://www.sharcnet.ca/Software/Ansys/16.2.3/en-us/help/ans_cmd/Hlp_C_ANGLE.html
/ESHAPE	/ESHAPE, SCALE, KEY	Displays elements with shapes determined from the real constants or section definition.	https://www.sharcnet.ca/Software/Ansys/16.2.3/en-us/help/ans_cmd/Hlp_C_ESHAPE.html
/IMAGE	/IMAGE, Label, Fname, Ext, --	Allows graphics data to be captured and saved.	https://www.sharcnet.ca/Software/Ansys/16.2.3/en-us/help/ans_cmd/Hlp_C_IMAGE.html
/PNUM	/PNUM, Label, KEY	Controls entity numbering/coloring on plots.	https://www.sharcnet.ca/Software/Ansys/16.2.3/en-us/help/ans_cmd/Hlp_C_PNUM.html
/POST1	/POST1	Enters the database results postprocessor.	https://www.sharcnet.ca/Software/Ansys/16.2.3/en-us/help/ans_cmd/Hlp_C_POST1.html
/PREP7	/PREP7	Enters the model creation preprocessor.	https://www.sharcnet.ca/Software/Ansys/16.2.3/en-us/help/ans_cmd/Hlp_C_PREP7.html
/REPLOT	/REPLOT, Label	Automatically reissues the last display command for convenience.	https://www.sharcnet.ca/Software/Ansys/16.2.3/en-us/help/ans_cmd/Hlp_C_REPLOT.html
/RGB	/RGB, Kywrd, PRED, PGRN, PBLU, N1, N2, NINC, NCNTR	Specifies the RGB color values for indices and contours.	https://www.sharcnet.ca/Software/Ansys/16.2.3/en-us/help/ans_cmd/Hlp_C_RGB.html
/SOL	/SOLU	Enters the solution processor.	https://www.sharcnet.ca/Software/Ansys/16.2.3/en-us/help/ans_cmd/Hlp_C_SOLU_sl.html
/SOLU	/SOLU	Enters the solution processor.	https://www.sharcnet.ca/Software/Ansys/16.2.3/en-us/help/ans_cmd/Hlp_C_SOLU_sl.html
/VIEW	/VIEW, WN, XV, YV, ZV	Defines the viewing direction for the display.	https://www.sharcnet.ca/Software/Ansys/16.2.3/en-us/help/ans_cmd/Hlp_C_VIEW.html
ACEL	ACEL, ACEL_X, ACEL_Y, ACEL_Z	Specifies the linear acceleration of the global Cartesian reference frame for the analysis.	https://www.sharcnet.ca/Software/Ansys/16.2.3/en-us/help/ans_cmd/Hlp_C_ACEL.html
AL	AL, L1, L2, L3, L4, L5, L6, L7, L8, L9, L10	Generates an area bounded by previously defined lines.	https://www.sharcnet.ca/Software/Ansys/16.2.3/en-us/help/ans_cmd/Hlp_C_AL.html
ALLSEL	ALLSEL, LabT, Entity	Selects all entities with a single command.	https://www.sharcnet.ca/Software/Ansys/16.2.3/en-us/help/ans_cmd/Hlp_C_ALLSEL.html
AMESH	AMESH, NA1, NA2, NINC	Generates nodes and area elements within areas.	https://www.sharcnet.ca/Software/Ansys/16.2.3/en-us/help/ans_cmd/Hlp_C_AMESH.html
ANTYPE	ANTYPE, Antype, Status, LDSTEP, SUBSTEP, Action	Specifies the analysis type and restart status.	https://www.sharcnet.ca/Software/Ansys/16.2.3/en-us/help/ans_cmd/Hlp_C_ANTYPE.html
AREVERSE	AREVERSE, ANUM, NOEFLIP	Reverses the normal of an area, regardless of its connectivity or mesh status.	https://www.sharcnet.ca/Software/Ansys/16.2.3/en-us/help/ans_cmd/Hlp_C_AREVERSE.html
AROTAT	AROTAT, NL1, NL2, NL3, NL4, NL5, NL6, PAX1, PAX2, ARC, NSEG	Generates cylindrical areas by rotating a line pattern about an axis.	https://www.sharcnet.ca/Software/Ansys/16.2.3/en-us/help/ans_cmd/Hlp_C_AROTAT.html
D	D, Node, Lab, VALUE, VALUE2, NEND, NINC, Lab2, Lab3, Lab4, Lab5, Lab6	Defines degree-of-freedom constraints at nodes.	https://www.sharcnet.ca/Software/Ansys/16.2.3/en-us/help/ans_cmd/Hlp_C_D.html
DL	DL, LINE, AREA, Lab, Value1, Value2	Defines DOF constraints on lines.	https://www.sharcnet.ca/Software/Ansys/16.2.3/en-us/help/ans_cmd/Hlp_C_DL.html
EPLOT	EPLOT	Produces an element display.	https://www.sharcnet.ca/Software/Ansys/16.2.3/en-us/help/ans_cmd/Hlp_C_EPLOT.html
EQSLV
ESLL	ESLL, Type	Selects those elements associated with the selected lines.	https://www.sharcnet.ca/Software/Ansys/16.2.3/en-us/help/ans_cmd/Hlp_C_ESLL.html
ET	ET, ITYPE, Ename, KOP1, KOP2, KOP3, KOP4, KOP5, KOP6, INOPR	Defines a local element type from the element library.	https://www.sharcnet.ca/Software/Ansys/16.2.3/en-us/help/ans_cmd/Hlp_C_ET.html
ETABLE	ETABLE, Lab, Item, Comp, Option	Fills a table of element values for further processing.	https://www.sharcnet.ca/Software/Ansys/16.2.3/en-us/help/ans_cmd/Hlp_C_ETABLE.html
F
FDELE
FINISH
K	K, NPT, X, Y, Z	Defines a keypoint.	https://www.sharcnet.ca/Software/Ansys/16.2.3/en-us/help/ans_cmd/Hlp_C_K.html
KEYW	KEYW, Keyword, KEY	Sets a keyword used by the GUI for context filtering (GUI).	https://www.sharcnet.ca/Software/Ansys/16.2.3/en-us/help/ans_cmd/Hlp_C_KEYW.html
KGEN
KSEL	KSEL, Type, Item, Comp, VMIN, VMAX, VINC, KABS	Selects a subset of keypoints or hard points.	https://www.sharcnet.ca/Software/Ansys/16.2.3/en-us/help/ans_cmd/Hlp_C_KSEL.html
L	L, P1, P2, NDIV, SPACE, XV1, YV1, ZV1, XV2, YV2, ZV2	Defines a line between two keypoints.	https://www.sharcnet.ca/Software/Ansys/16.2.3/en-us/help/ans_cmd/Hlp_C_L.html
LARC
LATT
LCASE
LCDEF
LCOPER
LESIZE	LESIZE, NL1, SIZE, ANGSIZ, NDIV, SPACE, KFORC, LAYER1, LAYER2, KYNDIV	Specifies the divisions and spacing ratio on unmeshed lines.	https://www.sharcnet.ca/Software/Ansys/16.2.3/en-us/help/ans_cmd/Hlp_C_LESIZE.html
LGEN
LINL	LINL, NL1, NL2, NL3, NL4, NL5, NL6, NL7, NL8, NL9	Finds the common intersection of lines.	https://www.sharcnet.ca/Software/Ansys/16.2.3/en-us/help/ans_cmd/Hlp_C_LINL.html
LMESH	LMESH, NL1, NL2, NINC	Generates nodes and line elements along lines.	https://www.sharcnet.ca/Software/Ansys/16.2.3/en-us/help/ans_cmd/Hlp_C_LMESH.html
LSEL	LSEL, Type, Item, Comp, VMIN, VMAX, VINC, KSWP	Selects a subset of lines.	https://www.sharcnet.ca/Software/Ansys/16.2.3/en-us/help/ans_cmd/Hlp_C_LSEL.html
LSSOLVE
LSWRITE
LSYMM	LSYMM, Ncomp, NL1, NL2, NINC, KINC, NOELEM, IMOVE	Generates lines from a line pattern by symmetry reflection.	https://www.sharcnet.ca/Software/Ansys/16.2.3/en-us/help/ans_cmd/Hlp_C_LSYMM.html
LUMPM
MODOPT
MPDATA	MPDATA, Lab, MAT, SLOC, C1, C2, C3, C4, C5, C6	Defines property data to be associated with the temperature table.	https://www.sharcnet.ca/Software/Ansys/16.2.3/en-us/help/ans_cmd/Hlp_C_MPDATA.html
MPTEMP	MPTEMP, SLOC, T1, T2, T3, T4, T5, T6	Defines a temperature table for material properties.	https://www.sharcnet.ca/Software/Ansys/16.2.3/en-us/help/ans_cmd/Hlp_C_MPTEMP.html
MSHKEY
MXPAND
NSLK	NSLK, Type	Selects those nodes associated with the selected keypoints.	https://www.sharcnet.ca/Software/Ansys/16.2.3/en-us/help/ans_cmd/Hlp_C_NSLK.html
NSLL
NUMMRG	NUMMRG, Label, TOLER, GTOLER, Action, Switch	Merges coincident or equivalently defined items.	https://www.sharcnet.ca/Software/Ansys/16.2.3/en-us/help/ans_cmd/Hlp_C_NUMMRG.html
PLDISP	PLDISP, KUND	Displays the displaced structure.	https://www.sharcnet.ca/Software/Ansys/16.2.3/en-us/help/ans_cmd/Hlp_C_PLDISP.html
PLLS	PLLS, LabI, LabJ, Fact, KUND, ViewUP	Displays element table items as contoured areas along elements.	https://www.sharcnet.ca/Software/Ansys/16.2.3/en-us/help/ans_cmd/Hlp_C_PLLS.html
PLNSOL	PLNSOL, Item, Comp, KUND, Fact, FileID	Displays results as continuous contours.	https://www.sharcnet.ca/Software/Ansys/16.2.3/en-us/help/ans_cmd/Hlp_C_PLNSOL.html
PSTRES
SECDATA	SECDATA, VAL1, VAL2, VAL3, VAL4, VAL5, VAL6, VAL7, VAL8, VAL9, VAL10, VAL11, VAL12	Describes the geometry of a section.	https://www.sharcnet.ca/Software/Ansys/16.2.3/en-us/help/ans_cmd/Hlp_C_SECDATA.html
SECN	SECNUM, SECID	Sets the element section attribute pointer.	https://www.sharcnet.ca/Software/Ansys/16.2.3/en-us/help/ans_cmd/Hlp_C_SECNUM.html
SECNUM	SECNUM, SECID	Sets the element section attribute pointer.	https://www.sharcnet.ca/Software/Ansys/16.2.3/en-us/help/ans_cmd/Hlp_C_SECNUM.html
SECOFFSET	SECOFFSET, Location, OFFSET1, OFFSET2, CG-Y, CG-Z, SH-Y, SH-Z	Defines the section offset for cross sections.	https://www.sharcnet.ca/Software/Ansys/16.2.3/en-us/help/ans_cmd/Hlp_C_SECOFFSET.html
SECT	SECTYPE, SECID, Type, Subtype, Name, REFINEKEY	Associates section type information with a section ID number.	https://www.sharcnet.ca/Software/Ansys/16.2.3/en-us/help/ans_cmd/Hlp_C_SECTYPE.html
SECTYPE	SECTYPE, SECID, Type, Subtype, Name, REFINEKEY	Associates section type information with a section ID number.	https://www.sharcnet.ca/Software/Ansys/16.2.3/en-us/help/ans_cmd/Hlp_C_SECTYPE.html
SET
SFA
SFBEAM	SFBEAM, Elem, LKEY, Lab, VALI, VALJ, VAL2I, VAL2J, IOFFST, JOFFST, LENRAT	Specifies surface loads on beam and pipe elements.	https://www.sharcnet.ca/Software/Ansys/16.2.3/en-us/help/ans_cmd/Hlp_C_SFBEAM.html
SOLVE	SOLVE, Action	Starts a solution.	https://www.sharcnet.ca/Software/Ansys/16.2.3/en-us/help/ans_cmd/Hlp_C_SOLVE.html
TYPE
